# OpenSim document version 40000
ScaleTool default:
  mass: -1
  height: -1
  age: -1
  ModelScaler default:
    scaling_order: measurements
    time_range: -1 -1
    preserve_mass_distribution: true
    MeasurementSet: file=Unassigned
  MarkerPlacer default:
    time_range: -1 -1
    max_marker_movement: -1
    IKTaskSet: file=Unassigned
